// SBML level 3 version 2

model bone_remodeling_model()
  // Stochastic Bone Remodeling with Biomarker Feedback
  // model units - substance: item, time: hour, extent: item

  // Compartments:
  compartment bone = 0.01 litre; bone is "Bone Microenvironment";
  compartment blood = 5 litre; blood is "Systemic Circulation";

  // Species:
  substanceOnly species Gravity in bone = 1000;
  substanceOnly species Radiation in bone = 0;
  substanceOnly species FluidShift in bone = 0;
  substanceOnly species CircadianDisruption in bone = 0;
  substanceOnly species ExerciseLoad in bone = 300;
  substanceOnly species Nutrition in bone = 1000;
  substanceOnly species StressHormones in bone = 500;
  substanceOnly species OxygenLevel in bone = 1000;
  substanceOnly species Osteocytes in bone = 10000;
  substanceOnly species Osteoblasts in bone = 500;
  substanceOnly species Osteoclasts in bone = 50;
  substanceOnly species OsteoblastPrecursors in bone = 200;
  substanceOnly species OsteoclastPrecursors in bone = 100;
  substanceOnly species Wnt_ligand in bone = 12044000000000;
  substanceOnly species LRP5_LRP6 in bone = 30110000000000;
  substanceOnly species BetaCatenin_cytoplasm in bone = 9033000000000;
  substanceOnly species BetaCatenin_nucleus in bone = 4817600000000;
  substanceOnly species GSK3beta in bone = 12044000000000;
  substanceOnly species TCF_LEF in bone = 3011000000000;
  substanceOnly species Sclerostin_ECM in bone = 4215400000000;
  substanceOnly species Sclerostin_blood in blood = 1.8066e15;
  substanceOnly species RANKL_membrane in bone = 3011000000000;
  substanceOnly species RANKL_soluble in bone = 4817600000000;
  substanceOnly species OPG_ECM in bone = 30110000000000;
  substanceOnly species RANK_osteoclast in bone = 12044000000000;
  substanceOnly species RANKL_RANK_complex in bone = 602200000000;
  substanceOnly species RANKL_OPG_complex in bone = 1806600000000;
  substanceOnly species PTH_blood in blood = 15055000000000;
  substanceOnly species PTH_ECM in bone = 24088000000;
  substanceOnly species PTH_receptor in bone = 18066000000000;
  substanceOnly species PTH_receptor_active in bone = 1806600000000;
  substanceOnly species cAMP in bone = 3011000000000;
  substanceOnly species PKA_active in bone = 1204400000000;
  substanceOnly species CREB_phosphorylated in bone = 602200000000;
  substanceOnly species VitaminD_blood in blood = 1.5055e17;
  substanceOnly species Cortisol_blood in blood = 9.033e17;
  substanceOnly species IL6_blood in blood = 150550000000000;
  substanceOnly species Estrogen_blood in blood = 2.1077e15;
  substanceOnly species FGF23_blood in blood = 120440000000000;
  substanceOnly species Phosphate_blood in blood = 3.3121e21;
  species BoneMass in bone = 4/bone;
  substanceOnly species BoneMineralDensity in bone = 1.2;
  substanceOnly species Microarchitecture in bone = 1;
  substanceOnly species Biomarker_ECM in bone = 0;

  // Parameters:
  k_mechano_sensitivity = 0.35;
  k_load_threshold = 1500;
  k_disuse_sclerostin = 0.25;
  k_fluid_shear_microgravity = 1.4;
  k_radiation_osteoblast_damage = 0.2;
  k_radiation_inflammation = 0.5;
  k_radiation_ocy_apoptosis = 0.25;
  k_sclero_basal = 148000;
  k_sclero_deg = 0.35;
  k_sclero_transport = 0.1;
  k_cortisol_enhance_sclero = 2;
  k_IL6_enhance_sclero = 0.4;
  k_osteoblast_diff = 1e-5;
  k_osteoclast_diff = 5e-6;
  k_osteoblast_apoptosis = 0.0025;
  k_osteoclast_apoptosis = 0.006;
  k_osteocyte_apoptosis_base = 0.0008;
  k_precursor_replenish = 0.015;
  k_bone_formation = 1e-7;
  k_bone_resorption = 1e-6;
  k_cortisol_prod = 165;
  k_cortisol_deg = 0.55;
  k_IL6_prod = 0.02;
  k_IL6_deg = 0.4;
  k_cortisol_RANKL = 2;
  k_PTH_basal = 0.005;
  k_PTH_deg = 15;
  biomarker_threshold = 1.5;
  k_biomarker_response = 5;
  k_biomarker_deg = 0.25;
  biomarker_IC50 = 2;
  hill_coefficient = 1.1;
  biomarker_active = 0;
  k_estrogen_OPG = 2;
  k_estrogen_RANKL = 0.5;
  k_estrogen_baseline = 0.7;
  k_estrogen_decline = 3e-5;
  PTH_dysregulation_factor = 1;
  k_FGF23_sclerostin = 1.3;
  k_FGF23_basal = 0.04;
  k_FGF23_phosphate = 2;
  k_FGF23_vitD = 0.004;
  k_FGF23_deg = 1;
  k_phosphate_basal = 1.1;
  k_phosphate_accumulation = 0.005;
  k_phosphate_clearance = 0.01;
  min_osteocytes = 250;
  min_bone_mass = 3;
  min_phosphate_mM = 0.7;
  k_wnt_production_basal = 36000000;
  k_wnt_degradation = 1.5;
  k_sclerostin_LRP_block = 3;
  k_LRP_regeneration = 0.3;
  k_beta_cat_stabilization = 0.7;
  k_beta_cat_degradation = 2.8;
  k_beta_cat_nuclear_import = 12;
  k_beta_cat_nuclear_export = 7;
  k_TCF_activation = 4;
  k_TCF_deactivation = 3;
  k_RANKL_membrane_prod = 3010000;
  k_RANKL_shedding = 0.5;
  k_OPG_production = 16900000;
  k_OPG_degradation = 0.28;
  k_RANKL_RANK_binding = 3.6;
  k_RANKL_RANK_dissociation = 18;
  k_OPG_RANKL_binding = 18;
  k_OPG_RANKL_dissociation = 3.6;
  k_RANKL_soluble_deg = 0.5;
  k_PTH_to_bone = 1.75;
  k_PTH_from_bone = 0.08;
  k_PTH_receptor_binding = 1.8;
  k_PTH_receptor_dissociation = 14.4;
  k_cAMP_production = 1;
  k_cAMP_degradation = 15;
  k_PKA_activation = 20;
  k_PKA_deactivation = 12;
  k_CREB_phosphorylation = 9;
  k_CREB_dephosphorylation = 4.5;
  LRP_baseline = 5;
  RANK_baseline = 2;

  // Assignment rules:
  EffectiveMechanicalLoad := Gravity + ExerciseLoad*0.4 + 0.1*(1000 - Gravity);
  MechanoSignal := EffectiveMechanicalLoad/(EffectiveMechanicalLoad + k_load_threshold);
  DisuseSignal := 1/(1 + k_mechano_sensitivity*EffectiveMechanicalLoad/1000);
  RadiationDamage := 1 + k_radiation_osteoblast_damage*Radiation;
  Cortisol_nM := Cortisol_blood/3.011e15;
  Estrogen_nM := Estrogen_blood/3.011e15;
  FGF23_nM := FGF23_blood/3.011e15;
  Phosphate_mM := Phosphate_blood/3.011e21;
  VitD_nM := VitaminD_blood/3.011e15;
  Sclerostin_nM := Sclerostin_ECM/6022000000000;
  PTH_nM := PTH_blood/3.011e15;
  IL6_nM := IL6_blood/3.011e15;
  StressEffect := 1 + (k_cortisol_enhance_sclero - 1)*(Cortisol_nM/300);
  InflammationEffect := 1 + k_IL6_enhance_sclero*(IL6_nM/0.05);
  VitD_effect := VitD_nM/50;
  Biomarker_activation := piecewise(0, Sclerostin_nM <= biomarker_threshold, (Sclerostin_nM - biomarker_threshold)^hill_coefficient/((Sclerostin_nM - biomarker_threshold)^hill_coefficient + biomarker_IC50^hill_coefficient));
  Biomarker_inhibition := 1/(1 + (biomarker_active*Biomarker_ECM/(6022000000000*biomarker_IC50))^hill_coefficient);
  PTH_sclerostin_suppression := 1/(1 + 3*(CREB_phosphorylated/6022000000000));
  PTH_wnt_stimulation := 1 + 1.5*(PKA_active/6022000000000);
  PTH_RANKL_effect := 1 + 0.8*(PTH_receptor_active/6022000000000);
  Wnt_LRP_active := piecewise(2, Wnt_ligand/6022000000000*(LRP5_LRP6/6022000000000)/(Wnt_ligand/6022000000000 + LRP5_LRP6/6022000000000 + 2) > 2, Wnt_ligand/6022000000000*(LRP5_LRP6/6022000000000)/(Wnt_ligand/6022000000000 + LRP5_LRP6/6022000000000 + 2));
  Estrogen_effect_OPG := 1 + (k_estrogen_OPG - 1)*(Estrogen_nM/k_estrogen_baseline);
  Estrogen_effect_RANKL := 1/(1 + k_estrogen_RANKL*(Estrogen_nM/k_estrogen_baseline));
  FGF23_sclerostin_effect := 1 + (k_FGF23_sclerostin - 1)*(FGF23_nM/k_FGF23_basal);

  // Reactions:
  R_sclero_production: => Sclerostin_ECM; k_sclero_basal*Osteocytes*(1 + k_disuse_sclerostin*DisuseSignal)*StressEffect*InflammationEffect;
  R_sclero_degradation: Sclerostin_ECM => ; k_sclero_deg*Sclerostin_ECM;
  R_sclero_transport: Sclerostin_ECM => Sclerostin_blood; k_sclero_transport*Sclerostin_ECM;
  R_sclero_blood_clear: Sclerostin_blood => ; k_sclero_deg*Sclerostin_blood;
  R_wnt_production: => Wnt_ligand; k_wnt_production_basal*Osteoblasts*PTH_wnt_stimulation;
  R_wnt_degradation: Wnt_ligand => ; k_wnt_degradation*Wnt_ligand;
  R_LRP_regeneration: => LRP5_LRP6; k_LRP_regeneration*(LRP_baseline*6022000000000 - LRP5_LRP6);
  R_LRP_block: LRP5_LRP6 => ; LRP5_LRP6*Sclerostin_nM/(Sclerostin_nM + k_sclerostin_LRP_block);
  R_beta_cat_stabilization: => BetaCatenin_cytoplasm; k_beta_cat_stabilization*Wnt_LRP_active*6022000000000;
  R_beta_cat_degradation: BetaCatenin_cytoplasm => ; k_beta_cat_degradation*BetaCatenin_cytoplasm*(1 - Wnt_LRP_active);
  R_beta_cat_nuclear_import: BetaCatenin_cytoplasm => BetaCatenin_nucleus; k_beta_cat_nuclear_import*BetaCatenin_cytoplasm;
  R_beta_cat_nuclear_export: BetaCatenin_nucleus => BetaCatenin_cytoplasm; k_beta_cat_nuclear_export*BetaCatenin_nucleus;
  R_TCF_activation: => TCF_LEF; k_TCF_activation*BetaCatenin_nucleus;
  R_TCF_deactivation: TCF_LEF => ; k_TCF_deactivation*TCF_LEF;
  R_RANKL_membrane_prod: => RANKL_membrane; k_RANKL_membrane_prod*Osteoblasts*PTH_RANKL_effect*Estrogen_effect_RANKL;
  R_RANKL_shedding: RANKL_membrane => RANKL_soluble; k_RANKL_shedding*RANKL_membrane;
  R_RANKL_soluble_deg: RANKL_soluble => ; k_RANKL_soluble_deg*RANKL_soluble;
  R_OPG_production: => OPG_ECM; k_OPG_production*Osteoblasts*Estrogen_effect_OPG;
  R_OPG_degradation: OPG_ECM => ; k_OPG_degradation*OPG_ECM;
  R_RANKL_RANK_binding: RANKL_soluble + RANK_osteoclast => RANKL_RANK_complex; k_RANKL_RANK_binding*RANKL_soluble*RANK_osteoclast/6022000000000;
  R_RANKL_RANK_dissociation: RANKL_RANK_complex => RANKL_soluble + RANK_osteoclast; k_RANKL_RANK_dissociation*RANKL_RANK_complex;
  R_OPG_RANKL_binding: OPG_ECM + RANKL_soluble => RANKL_OPG_complex; k_OPG_RANKL_binding*OPG_ECM*RANKL_soluble/6022000000000;
  R_OPG_RANKL_dissociation: RANKL_OPG_complex => OPG_ECM + RANKL_soluble; k_OPG_RANKL_dissociation*RANKL_OPG_complex;
  R_osteoblast_diff: OsteoblastPrecursors => Osteoblasts; k_osteoblast_diff*OsteoblastPrecursors*(1 + Wnt_LRP_active)*(1000/(1000 + Osteoblasts))/RadiationDamage;
  R_osteoblast_apoptosis: Osteoblasts => ; k_osteoblast_apoptosis*Osteoblasts;
  R_osteoclast_diff: OsteoclastPrecursors => Osteoclasts; k_osteoclast_diff*OsteoclastPrecursors*(1 + RANKL_RANK_complex/(RANK_baseline*6022000000000))*(200/(200 + Osteoclasts));
  R_osteoclast_apoptosis: Osteoclasts => ; k_osteoclast_apoptosis*Osteoclasts;
  R_osteocyte_apoptosis: Osteocytes => ; piecewise(0, Osteocytes <= min_osteocytes, k_osteocyte_apoptosis_base*Osteocytes*(1 + k_radiation_ocy_apoptosis*Radiation));
  R_precursor_replenish_ob: => OsteoblastPrecursors; k_precursor_replenish*(200 - OsteoblastPrecursors);
  R_precursor_replenish_oc: => OsteoclastPrecursors; k_precursor_replenish*(100 - OsteoclastPrecursors);
  R_bone_formation: => BoneMass; k_bone_formation*Osteoblasts;
  R_bone_resorption: BoneMass => ; piecewise(0, BoneMass <= min_bone_mass, k_bone_resorption*Osteoclasts);
  R_PTH_production: => PTH_blood; k_PTH_basal*3.011e15*k_PTH_deg*(1 + biomarker_active*5*Biomarker_activation)*PTH_dysregulation_factor;
  R_PTH_degradation: PTH_blood => ; k_PTH_deg*PTH_blood;
  R_PTH_to_bone: PTH_blood => PTH_ECM; k_PTH_from_bone*PTH_blood;
  R_PTH_receptor_binding: PTH_ECM + PTH_receptor => PTH_receptor_active; k_PTH_receptor_binding*PTH_ECM*PTH_receptor/6022000000000;
  R_PTH_receptor_dissociation: PTH_receptor_active => PTH_ECM + PTH_receptor; k_PTH_receptor_dissociation*PTH_receptor_active;
  R_cAMP_production: => cAMP; k_cAMP_production*PTH_receptor_active;
  R_cAMP_degradation: cAMP => ; k_cAMP_degradation*cAMP;
  R_PKA_activation: => PKA_active; k_PKA_activation*cAMP;
  R_PKA_deactivation: PKA_active => ; k_PKA_deactivation*PKA_active;
  R_CREB_phosphorylation: => CREB_phosphorylated; k_CREB_phosphorylation*PKA_active;
  R_CREB_dephosphorylation: CREB_phosphorylated => ; k_CREB_dephosphorylation*CREB_phosphorylated;
  R_cortisol_production: => Cortisol_blood; k_cortisol_prod*3.011e15*(1 + StressHormones/1000);
  R_cortisol_degradation: Cortisol_blood => ; k_cortisol_deg*Cortisol_blood;
  R_IL6_production: => IL6_blood; k_IL6_prod*3.011e15*(1 + k_radiation_inflammation*Radiation);
  R_IL6_degradation: IL6_blood => ; k_IL6_deg*IL6_blood;
  R_phosphate_production: => Phosphate_blood; k_phosphate_accumulation*3.011e21;
  R_phosphate_clearance: Phosphate_blood => ; piecewise(0, Phosphate_mM <= min_phosphate_mM, k_phosphate_clearance*Phosphate_blood);
  R_FGF23_production: => FGF23_blood; k_FGF23_basal*3.011e15*k_FGF23_deg*(1 + k_FGF23_phosphate*(Phosphate_mM - 1.1));
  R_FGF23_degradation: FGF23_blood => ; k_FGF23_deg*FGF23_blood;
  R_biomarker_production: => Biomarker_ECM; k_biomarker_response*Biomarker_activation*6022000000000;
  R_biomarker_degradation: Biomarker_ECM => ; k_biomarker_deg*Biomarker_ECM;
  R_estrogen_decline: Estrogen_blood => ; k_estrogen_decline*Estrogen_blood;

  // Events:
  biomarker_activation_event: at (Sclerostin_nM > biomarker_threshold), t0=false: biomarker_active = 1;
end
